*Heading
** Job name: re_defect1 Model name: re_nodefect5
** Generated by: Abaqus/CAE 2024
*Preprint, echo=NO, model=NO, history=NO, contact=NO
**
** PARTS
**
*Part, name=INTERSTAGE_1/8
*Node
1, -1398.65723, 1398.65723, 0.0
2, -1398.65723, 1398.65723, 25.0
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*Element, type=C3D8R
1, 1, 2, 31, 30, 1828, 1829, 1858, 1857
2, 2, 3, 32, 31, 1829, 1830, 1859, 1858
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*Nset, nset=LAYER1_MAT0, generate
    1,  3654,     1
*Elset, elset=LAYER1_MAT0
1, 2, 3, 4, 5, 6
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*Nset, nset=LAYER2_MAT45, generate
 1828,  5481,     1
*Elset, elset=LAYER2_MAT45
1737, 1738, 1739, 1740, 1741, 1742
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*Nset, nset=LAYER3_MAT90, generate
 3655,  7308,     1
*Elset, elset=LAYER3_MAT90
3473, 3474, 3475, 3476, 3477, 3478
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*Nset, nset=LAYER4_MAT-45, generate
 5482,  9135,     1
*Elset, elset=LAYER4_MAT-45
5209, 5210, 5211, 5212, 5213, 5214
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*Nset, nset=LAYER5_MAT0, generate
  7309,  10962,      1
*Elset, elset=LAYER5_MAT0
6945, 6946, 6947, 6948, 6949, 6950
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*Nset, nset=LAYER6_MAT0, generate
  9136,  12789,      1
*Elset, elset=LAYER6_MAT0
8681, 8682, 8683, 8684, 8685, 8686
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*Nset, nset=LAYER7_MAT-45, generate
 10963,  14616,      1
*Elset, elset=LAYER7_MAT-45
10417, 10418, 10419, 10420, 10421, 10422
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*Nset, nset=LAYER8_MAT90, generate
 12790,  16443,      1
*Elset, elset=LAYER8_MAT90
12153, 12154, 12155, 12156, 12157, 12158
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*Nset, nset=LAYER9_MAT45, generate
 14617,  18270,      1
*Elset, elset=LAYER9_MAT45
13889, 13890, 13891, 13892, 13893, 13894
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*Nset, nset=LAYER10_MAT0, generate
 16444,  20097,      1
*Elset, elset=LAYER10_MAT0
15625, 15626, 15627, 15628, 15629, 15630
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*Nset, nset=FOAMCORE_CENTER, generate
 18271,  21924,      1
*Elset, elset=FOAMCORE_CENTER
17361, 17362, 17363, 17364, 17365, 17366
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*Nset, nset=LAYER11_MAT0, generate
 20098,  23751,      1
*Elset, elset=LAYER11_MAT0
19097, 19098, 19099, 19100, 19101, 19102
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*Nset, nset=LAYER12_MAT45, generate
 21925,  25578,      1
*Elset, elset=LAYER12_MAT45
20833, 20834, 20835, 20836, 20837, 20838
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*Nset, nset=LAYER13_MAT90, generate
 23752,  27405,      1
*Elset, elset=LAYER13_MAT90
22569, 22570, 22571, 22572, 22573, 22574
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*Nset, nset=LAYER14_MAT-45, generate
 25579,  29232,      1
*Elset, elset=LAYER14_MAT-45
24305, 24306, 24307, 24308, 24309, 24310
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*Nset, nset=LAYER15_MAT0, generate
 27406,  31059,      1
*Elset, elset=LAYER15_MAT0
26041, 26042, 26043, 26044, 26045, 26046
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*Nset, nset=LAYER16_MAT0, generate
 29233,  32886,      1
*Elset, elset=LAYER16_MAT0
27777, 27778, 27779, 27780, 27781, 27782
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*Nset, nset=LAYER17_MAT-45, generate
 31060,  34713,      1
*Elset, elset=LAYER17_MAT-45
29513, 29514, 29515, 29516, 29517, 29518
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*Nset, nset=LAYER18_MAT90, generate
 32887,  36540,      1
*Elset, elset=LAYER18_MAT90
31249, 31250, 31251, 31252, 31253, 31254
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*Nset, nset=LAYER19_MAT45, generate
 34714,  38367,      1
*Elset, elset=LAYER19_MAT45
32985, 32986, 32987, 32988, 32989, 32990
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*Nset, nset=LAYER20_MAT0, generate
 36541,  40194,      1
*Elset, elset=LAYER20_MAT0
34721, 34722, 34723, 34724, 34725, 34726
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*Elset, elset=Defect
29319, 29320, 29321, 29322, 29323, 29324
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
*Orientation, name=Ori-4, system=CYLINDRICAL
          0.,           0.,           0.,           0.,           0.,           1.
3, 0.
** Section: Section-1-LAYER1_MAT0
*Solid Section, elset=LAYER1_MAT0, orientation=Ori-4, material=CFRP_0DEGREE
,
** Section: Section-2-LAYER2_MAT45
*Solid Section, elset=LAYER2_MAT45, orientation=Ori-4, material=CFRP_45DEGREE
,
** Section: Section-3-LAYER3_MAT90
*Solid Section, elset=LAYER3_MAT90, orientation=Ori-4, material=CFRP_90DEGREE
,
** Section: Section-4-LAYER4_MAT-45
*Solid Section, elset=LAYER4_MAT-45, orientation=Ori-4, material=CFRP_-45DEGREE
,
** Section: Section-5-LAYER5_MAT0
*Solid Section, elset=LAYER5_MAT0, orientation=Ori-4, material=CFRP_0DEGREE
,
** Section: Section-6-LAYER6_MAT0
*Solid Section, elset=LAYER6_MAT0, orientation=Ori-4, material=CFRP_0DEGREE
,
** Section: Section-7-LAYER7_MAT-45
*Solid Section, elset=LAYER7_MAT-45, orientation=Ori-4, material=CFRP_-45DEGREE
,
** Section: Section-8-LAYER8_MAT90
*Solid Section, elset=LAYER8_MAT90, orientation=Ori-4, material=CFRP_90DEGREE
,
** Section: Section-9-LAYER9_MAT45
*Solid Section, elset=LAYER9_MAT45, orientation=Ori-4, material=CFRP_45DEGREE
,
** Section: Section-10-LAYER10_MAT0
*Solid Section, elset=LAYER10_MAT0, orientation=Ori-4, material=CFRP_0DEGREE
,
** Section: Section-11-FOAMCORE_CENTER
*Solid Section, elset=FOAMCORE_CENTER, orientation=Ori-4, material=FOAMCORE
,
** Section: Section-12-LAYER11_MAT0
*Solid Section, elset=LAYER11_MAT0, orientation=Ori-4, material=CFRP_0DEGREE
,
** Section: Section-13-LAYER12_MAT45
*Solid Section, elset=LAYER12_MAT45, orientation=Ori-4, material=CFRP_45DEGREE
,
** Section: Section-14-LAYER13_MAT90
*Solid Section, elset=LAYER13_MAT90, orientation=Ori-4, material=CFRP_90DEGREE
,
** Section: Section-15-LAYER14_MAT-45
*Solid Section, elset=LAYER14_MAT-45, orientation=Ori-4, material=CFRP_-45DEGREE
,
** Section: Section-16-LAYER15_MAT0
*Solid Section, elset=LAYER15_MAT0, orientation=Ori-4, material=CFRP_0DEGREE
,
** Section: Section-17-LAYER16_MAT0
*Solid Section, elset=LAYER16_MAT0, orientation=Ori-4, material=CFRP_0DEGREE
,
** Section: Section-18-LAYER17_MAT-45
*Solid Section, elset=LAYER17_MAT-45, orientation=Ori-4, material=CFRP_-45DEGREE
,
** Section: Section-19-LAYER18_MAT90
*Solid Section, elset=LAYER18_MAT90, orientation=Ori-4, material=CFRP_90DEGREE
,
** Section: Section-20-LAYER19_MAT45
*Solid Section, elset=LAYER19_MAT45, orientation=Ori-4, material=CFRP_45DEGREE
,
** Section: Section-21-LAYER20_MAT0
*Solid Section, elset=LAYER20_MAT0, orientation=Ori-4, material=CFRP_0DEGREE
,
** Section: Defect
*Solid Section, elset=Defect, orientation=Ori-4, material=DEFECT
,
*End Part
**
**
** ASSEMBLY
**
*Assembly, name=Assembly
**
*Instance, name=INTERSTAGE_1/8-1, part=INTERSTAGE_1/8
*End Instance
**
*Node
      3,           0.,           0.,           0.
*Node
      4,           0.,           0.,         700.
*Node
      1,           0.,           0.,           0.
      2,           0.,           0.,         700.
*Nset, nset=ENCASTRE, instance=INTERSTAGE_1/8-1, generate
     1,  40166,     29
*Nset, nset=LEFT_SURF, instance=INTERSTAGE_1/8-1
  1799,  1800,  1801,  1802,  1803,  1804
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*Nset, nset=RIGHT_SURF, instance=INTERSTAGE_1/8-1
     1,     2,     3,     4,     5,     6
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*Nset, nset=TENSILE_SURFACE, instance=INTERSTAGE_1/8-1, generate
    29,  40194,     29
*Elset, elset=_LEFT_SURF_S5, internal, instance=INTERSTAGE_1/8-1
  1709,  1710,  1711,  1712,  1713,  1714
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*Nset, nset=_M19, internal, instance=INTERSTAGE_1/8-1
     1,     2,     3,     4,     5,     6
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*Nset, nset=_M20, internal, instance=INTERSTAGE_1/8-1
     1,     2,     3,     4,     5,     6
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*Nset, nset=_M21, internal, instance=INTERSTAGE_1/8-1
  1799,  1800,  1801,  1802,  1803,  1804
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*Nset, nset=_M22, internal, instance=INTERSTAGE_1/8-1
  1799,  1800,  1801,  1802,  1803,  1804
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*Elset, elset=_RIGHT_SURF_S3, internal, instance=INTERSTAGE_1/8-1
     1,     2,     3,     4,     5,     6
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*Surface, type=ELEMENT, name=LEFT_SURF
_LEFT_SURF_S5, S5
*Surface, type=ELEMENT, name=RIGHT_SURF
_RIGHT_SURF_S3, S3
*Tie, name=Int-CycSymm, cyclic symmetry, adjust=yes
LEFT_SURF, RIGHT_SURF
*End Assembly
**
** MATERIALS
**
*Material, name=CFRP_-45DEGREE
*Elastic, type=ANISOTROPIC
43834., 3705.,11488.,33434., 3705.,43834.,    0.,    0.
    0., 4300.,    0.,    0.,    0., -900., 4300.,31482.
 -889.,31482.,    0.,    0.,35818.
*Material, name=CFRP_0DEGREE
*Elastic, type=ENGINEERING CONSTANTS
9650.,   9650., 136600.,     0.4, 0.02049, 0.02049,   3400.,   5200.
   5200.,
*Material, name=CFRP_45DEGREE
*Elastic, type=ANISOTROPIC
43834.,  3705., 11488.,  3343.,  3705., 43834.,     0.,     0.
     0.,  4300.,     0.,     0.,     0.,   900.,  4300.,-31482.
   889.,-31482.,     0.,     0., 35818.
*Material, name=CFRP_90DEGREE
*Elastic, type=ENGINEERING CONSTANTS
9650., 136600.,   9650., 0.02049,     0.4,    0.29,   5200.,   3400.
   5200.,
*Material, name=DEFECT
*Elastic
300000., 0.29
*Material, name=FOAMCORE
*Elastic
 80.1, 0.29
**
** BOUNDARY CONDITIONS
**
** Name: Disp-BC-1 Type: Symmetry/Antisymmetry/Encastre
*Boundary
ENCASTRE, ENCASTRE
** Name: Disp-BC-2 Type: Displacement/Rotation
*Boundary
RIGHT_SURF, 1, 1
** Name: Disp-BC-3 Type: Displacement/Rotation
*Boundary
RIGHT_SURF, 2, 2
** Name: Disp-BC-4 Type: Displacement/Rotation
*Boundary
LEFT_SURF, 1, 1
** Name: Disp-BC-5 Type: Displacement/Rotation
*Boundary
LEFT_SURF, 2, 2
*Cyclic Symmetry Model, n=8
0., 0., 0., 0., 0., 700.
** ----------------------------------------------------------------
**
** STEP: Step-1
**
*Step, name=Step-1, nlgeom=NO, inc=1000
*Static
0.05, 1., 1e-05, 0.05
**
** BOUNDARY CONDITIONS
**
** Name: Disp-BC-1 Type: Symmetry/Antisymmetry/Encastre
*Boundary, op=NEW
ENCASTRE, ENCASTRE
** Name: Disp-BC-2 Type: Displacement/Rotation
*Boundary, op=NEW
** Name: Disp-BC-3 Type: Displacement/Rotation
*Boundary, op=NEW
** Name: Disp-BC-4 Type: Displacement/Rotation
*Boundary, op=NEW
** Name: Disp-BC-5 Type: Displacement/Rotation
*Boundary, op=NEW
** Name: Disp-BC-6 Type: Displacement/Rotation
*Boundary, op=NEW
TENSILE_SURFACE, 1, 1
** Name: Disp-BC-7 Type: Displacement/Rotation
*Boundary, op=NEW
TENSILE_SURFACE, 2, 2
** Name: Disp-BC-8 Type: Displacement/Rotation
*Boundary, op=NEW
TENSILE_SURFACE, 3, 3, 10.
** Name: Disp-BC-9 Type: Displacement/Rotation
*Boundary, op=NEW
TENSILE_SURFACE, 4, 4
** Name: Disp-BC-10 Type: Displacement/Rotation
*Boundary, op=NEW
TENSILE_SURFACE, 5, 5
** Name: Disp-BC-11 Type: Displacement/Rotation
*Boundary, op=NEW
TENSILE_SURFACE, 6, 6
** Name: Disp-BC-12 Type: Displacement/Rotation
*Boundary, op=NEW
_M19, 1, 1
** Name: Disp-BC-13 Type: Displacement/Rotation
*Boundary, op=NEW
_M20, 2, 2
** Name: Disp-BC-14 Type: Displacement/Rotation
*Boundary, op=NEW
_M21, 1, 1
** Name: Disp-BC-15 Type: Displacement/Rotation
*Boundary, op=NEW
_M22, 2, 2
**
** OUTPUT REQUESTS
**
*Restart, write, frequency=0
**
** FIELD OUTPUT: F-Output-1
**
*Output, field, variable=PRESELECT
**
** HISTORY OUTPUT: H-Output-1
**
*Output, history, variable=PRESELECT
*End Step
